// COMSOL Multiphysics 6.1.0.282 model "MEMS_Pressure_Sensor_Phase1.mph"
// Outline of the model tree

Parameters
  L_sub = 2000[um]  // طول القاعدة
  th_sub = 400[um]  // سمك القاعدة الكلي
  L_mem = 1000[um]  // طول الغشاء
  th_mem = 20[um]  // سمك الغشاء المرن
  P_app = 100[kPa]  // الضغط التجريبي

Geometry
  geom1 "Geometry 1" (3D, length unit µm)
    blk1: Block | base = center; size = {L_sub, L_sub, th_sub}
    blk2: Block | pos = {0, 0, -th_mem / 2}; base = center; size = {L_mem, L_mem, th_mem}
    dif1: Difference | input = blk1; input2 = blk2
    fin: Finalize "Form Union"

Materials
  mat1: Common "Si - Silicon (single-crystal, isotropic)" on all domains
    def "Basic"
      thermalexpansioncoefficient = 2.6e-6[1/K]
      heatcapacity = 700[J/(kg*K)]
      relpermittivity = 11.7
      density = 2329[kg/m^3]
      thermalconductivity = 130[W/(m*K)]
    Enu "Young's modulus and Poisson's ratio"
      E = 170e9[Pa]
      nu = 0.28

Physics
  solid: SolidMechanics on all domains
    dependent variable u = {u, v, w}
    lemm1: LinearElasticModel "Linear Elastic Material 1" (default)
    free1: Free (default)
    init1: init "Initial Values 1" (default)
    fix1: Fixed "Fixed Constraint 1" on boundaries 3
    bndl1: BoundaryLoad on boundaries 9 | LoadType = FollowerPressure; FollowerPressure = P_app

Mesh
  mesh1 "Mesh 1" (physics-controlled)
    size: MeshSizeDefault | hauto = 4

Studies
  std1 "Study 1"
    stat: Stationary

Solver configurations
  sol1 "Solution 1" (study std1)
    v1: Variables "Dependent Variables 1"
    s1: Stationary "Stationary Solver 1"
      fc1: FullyCoupled | linsolver = d1
      d1: Direct "Suggested Direct Solver (solid)" | linsolver = pardiso; pivotperturb = 1.0E-9

Datasets
  dset1: Solution | solution = sol1

Plots
  pg1: PlotGroup3D "3D Plot Group 1"
  pg2: PlotGroup3D "Stress (solid)" | data = dset1
    vol1: Volume | expr = solid.mises
      def: Deform "Deformation" | expr = {u, v, w}; descr = Displacement field
  pg3: PlotGroup3D "3D Plot Group 3" | data = dset1
    vol1: Volume | expr = solid.disp; descr = Displacement magnitude