// COMSOL Multiphysics 6.1.0.282 model "MEMS_Pressure_Sensor_Phase3.mph"
// Outline of the model tree

Parameters
  L_sub = 2000[um]  // طول القاعدة
  th_sub = 400[um]  // سمك القاعدة الكلي
  L_mem = 1000[um]  // طول الغشاء
  th_mem = 20[um]  // سمك الغشاء المرن
  P_app = 100[kPa]  // الضغط التجريبي

Geometry
  geom1 "Geometry 1" (3D, length unit µm)
    blk1: Block | base = center; size = {L_sub, L_sub, th_sub}
    blk2: Block | pos = {0, 0, -th_mem / 2}; base = center; size = {L_mem, L_mem, th_mem}
    dif1: Difference | input = blk1; input2 = blk2
    fin: Finalize "Form Union"

Materials
  mat3: Common "p-Silicon (single-crystal, lightly doped)" on domains 1
    // C. S. Smith, “Piezoresistance Effect in Silicon and Germanium”, Physical Review, vol. 94, no. 1, pp. 42-49, 1957.
    // C. Jacoboni, C. Canali, G. Ottaviani and A. Alberigi Quaranta, “A Review of some Charge Transport Properties of Silicon”, Solid-State Electronics, vol. 20, pp. 77-89, 1977.
    def "Basic"
      density = 2330[kg/m^3]
      relpermittivity = 4.5
      electricconductivity = sigma0(nd[m^3])
      an1: Analytic | funcname = sigma0; expr = (N*e_const*0.048/sqrt(1+N/(N/81 +4e22))); args = N
    Anisotropic
      D = {166[GPa], 64[GPa], 64[GPa], 0[GPa], 0[GPa], 0[GPa], 64[GPa], 166[GPa], 64[GPa], 0[GPa], 0[GPa], 0[GPa], 64[GPa], 64[GPa], 166[GPa], 0[GPa], 0[GPa], 0[GPa], 0[GPa], 0[GPa], 0[GPa], 80[GPa], 0[GPa], 0[GPa], 0[GPa], 0[GPa], 0[GPa], 0[GPa], 80[GPa], 0[GPa], 0[GPa], 0[GPa], 0[GPa], 0[GPa], 0[GPa], 80[GPa]}
      eta_D = {0, 0, 0, 0, 0, 0, 0, 0, 0, 0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}
    AnisotropicVoGrp "Anisotropic, Voigt notation"
      DVo = {166[GPa], 64[GPa], 64[GPa], 0[GPa], 0[GPa], 0[GPa], 64[GPa], 166[GPa], 64[GPa], 0[GPa], 0[GPa], 0[GPa], 64[GPa], 64[GPa], 166[GPa], 0[GPa], 0[GPa], 0[GPa], 0[GPa], 0[GPa], 0[GPa], 80[GPa], 0[GPa], 0[GPa], 0[GPa], 0[GPa], 0[GPa], 0[GPa], 80[GPa], 0[GPa], 0[GPa], 0[GPa], 0[GPa], 0[GPa], 0[GPa], 80[GPa]}
      eta_DVo = {0, 0, 0, 0, 0, 0, 0, 0, 0, 0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}
    PiezoresistanceForm
      Pil = {6.6e-11[1/Pa]/sigma0(nd[m^3])[S/m], -1.1e-11[1/Pa]/sigma0(nd[m^3])[S/m], -1.1e-11[1/Pa]/sigma0(nd[m^3])[S/m], 0, 0, 0, -1.1e-11[1/Pa]/sigma0(nd[m^3])[S/m], 6.6e-11[1/Pa]/sigma0(nd[m^3])[S/m], -1.1e-11[1/Pa]/sigma0(nd[m^3])[S/m], 0, 0, 0, -1.1e-11[1/Pa]/sigma0(nd[m^3])[S/m], -1.1e-11[1/Pa]/sigma0(nd[m^3])[S/m], 6.6e-11[1/Pa]/sigma0(nd[m^3])[S/m], 0, 0, 0, 0, 0, 0, 138.1e-11[1/Pa]/sigma0(nd[m^3])[S/m], 0, 0, 0, 0, 0, 0, 138.1e-11[1/Pa]/sigma0(nd[m^3])[S/m], 0, 0, 0, 0, 0, 0, 138.1e-11[1/Pa]/sigma0(nd[m^3])[S/m]}
      an1: Analytic | funcname = sigma0; expr = (N*e_const*0.048/sqrt(1+N/(N/81 +4e22))); args = N
    ElastoresistanceForm
      ml = {9.6/sigma0(nd[m^3])[S/m], 1.8/sigma0(nd[m^3])[S/m], 1.8/sigma0(nd[m^3])[S/m], 0, 0, 0, 1.8/sigma0(nd[m^3])[S/m], 9.6/sigma0(nd[m^3])[S/m], 1.8/sigma0(nd[m^3])[S/m], 0, 0, 0, 1.8/sigma0(nd[m^3])[S/m], 1.8/sigma0(nd[m^3])[S/m], 9.6/sigma0(nd[m^3])[S/m], 0, 0, 0, 0, 0, 0, 110.0/sigma0(nd[m^3])[S/m], 0, 0, 0, 0, 0, 0, 110.0/sigma0(nd[m^3])[S/m], 0, 0, 0, 0, 0, 0, 110.0/sigma0(nd[m^3])[S/m]}
      an1: Analytic | funcname = sigma0; expr = (N*e_const*0.048/sqrt(1+N/(N/81 +4e22))); args = N

Physics
  solid: SolidMechanics on all domains
    dependent variable u = {u, v, w}
    lemm1: LinearElasticModel "Linear Elastic Material 1" (default) | SolidModel = Anisotropic
    free1: Free (default)
    init1: init "Initial Values 1" (default)
    fix1: Fixed "Fixed Constraint 1" on boundaries 3
    bndl1: BoundaryLoad on boundaries 9 | LoadType = FollowerPressure; FollowerPressure = P_app
  ec: ConductiveMedia "Electric Currents" on all domains
    dependent variable V
    cucn1: CurrentConservation (default)
    ein1: ElectricInsulation (default)
    init1: init "Initial Values 1" (default)
    pzrm1: PiezoresistiveMaterial on all domains | sigma0_mat = userdef; sigma0 = 1000; minput_numberdensity = 1e22
    term1: Terminal on boundaries 9 | TerminalType = Voltage
    gnd1: Ground on boundaries 3
  cir: Circuit "Electrical Circuit"
    dependent variable voltages
    gnd1: GroundNode
    V1: VoltageSource | Connections = {1, 0}; value = 5[V]
    R1: Resistor | R = 0.25066[ohm]*(1 + 6.78e-6[1/kPa]*P_app); Connections = {1, 2}
    R2: Resistor | R = 0.25066[ohm]*(1 - 6.78e-6[1/kPa]*P_app); Connections = {2, 0}
    R3: Resistor | R = 0.25066[ohm]*(1 - 6.78e-6[1/kPa]*P_app); Connections = {1, 3}
    R4: Resistor | R = 0.25066[ohm]*(1 + 6.78e-6[1/kPa]*P_app); Connections = {3, 0}

Multiphysics
  pzrd1: PiezoresistiveEffectDomain "Piezoresistive Effect, Domain Currents 1" on all domains
    Solid_physics = solid
    ElectricCurrents_physics = ec

Mesh
  mesh1 "Mesh 1" (physics-controlled)
    size: MeshSizeDefault | hauto = 4

Studies
  std1 "Study 1"
    param: Parametric "Parametric Sweep" | pname = P_app; plistarr = range(0, 20[kPa], 100[kPa]); punit = kPa
    stat: Stationary

Solver configurations
  sol1 "Solution 1" (study std1)
    v1: Variables "Dependent Variables 1"
    s1: Stationary "Stationary Solver 1"
      dDef: Direct
      p1: Parametric | pname = P_app; plistarr = range(0, 20[kPa], 100[kPa]); punit = kPa; pcontinuationmode = no
      se1: Segregated
        ss1: SegregatedStep "Electrical Circuit" | segvar = {comp1_currents}; linsolver = dDef
        ss2: SegregatedStep "Electric Currents" | segvar = {comp1_V}; linsolver = i1
        ss3: SegregatedStep "Solid Mechanics" | segvar = {comp1_u}; linsolver = d1
      i1: Iterative | linsolver = cg
        mg1: Multigrid | prefun = amg; coarseningmethod = classic
      d1: Direct "Suggested Direct Solver (solid)" | linsolver = pardiso; pivotperturb = 1.0E-9

Datasets
  dset1: Solution | solution = sol1

Derived values
  gev1: EvalGlobal "Global Evaluation 1" | data = dset1; table = tbl2; expr = 1/ec.G11; unit = Ω

Tables
  tbl2: Table
    // Global Evaluation 1
    1/ec.G11 (Ω)
    0.250815

Plots
  pg1: PlotGroup3D "3D Plot Group 1"
  pg2: PlotGroup3D "Stress (solid)" | data = dset1
    vol1: Volume | expr = solid.mises
      def: Deform "Deformation" | expr = {u, v, w}; descr = Displacement field
  pg3: PlotGroup3D "Electric Potential" | data = dset1
    vol1: Volume | expr = V; unit = V; descr = Electric potential
  pg4: PlotGroup1D "1D Plot Group 4" | data = dset1
    glob1: Global | expr = 1/ec.G11
  pg5: PlotGroup1D "1D Plot Group 5" | data = dset1
    glob1: Global | expr = cir.v_3 - cir.v_2; unit = mV